# samQEq example: SPC-FQ fluctuating-charge water (long-range Ewald, lr_ewald=2).
#
# A condensed-phase fluctuating-charge water model: the charges respond self-consistently to the
# instantaneous environment with full Ewald electrostatics. spcfq_expt.param is fit to the exact
# experimental monomer dipole (1.855 D) with the O-O LJ refit to the liquid density; it reproduces
# rho ~ 0.994 g/cc, liquid dipole ~2.80 D, and 3PT entropy ~66.7 J/mol/K (NIST 69.9). See the
# top-level README for details.
#
# This deck does a single-point charge equilibration on a small liquid cell and reports the per-atom
# charges + system dipole. For dynamics, add an integrator (e.g. `fix integ all rigid/nve/small
# molecule`) and optionally extended-Lagrangian charges (`fix_modify chg xl 5.0e-5 0.5`).

units        metal
atom_style   full
boundary     p p p
lattice      sc 3.1
region       box block 0 4 0 4 0 4
create_box   2 box
mass         1 15.9994        # O
mass         2 1.008          # H
molecule     h2o spcfq.mol
create_atoms 0 box mol h2o 12345
group        fq type 1 2
set          type 1 charge -0.85
set          type 2 charge  0.425

pair_style   hybrid/overlay lj/cut 10.0 coul/long 10.0 coul/shield/intra 5.0 all
pair_coeff   1 1 lj/cut 0.01275 3.176
pair_coeff   1 2 lj/cut 0.0 1.0
pair_coeff   2 2 lj/cut 0.0 1.0
pair_coeff   * * coul/long
pair_coeff   * * coul/shield/intra 1.11    # match the param gamma column
kspace_style pppm/samqeq 1.0e-6
neighbor     2.0 bin

fix          chg fq qeq/sam 1 0.0 10.0 1.0e-5 spcfq_expt.param
fix_modify   chg energy yes   # put Sum(chi*q + eta*q^2/2) into thermo pe. Off by default, and
                              # without it pe omits the charge self-energy entirely: a deck
                              # extended from this one into dynamics would report a potential
                              # energy that cannot show a conservation problem.
compute      dip fq dipole/samqeq
thermo_style custom step c_dip pe etotal
run          0
print        "SPC-FQ water: system dipole magnitude = $(c_dip)"
