# Bit-correctness + documented-reference check: a single SPC-FQ molecule in a
# large periodic box, solved with the long-range path (pppm/samqeq, lr_ewald=2,
# spcfq_expt.param). The mean per-molecule dipole c_dip should reproduce the
# recorded pre-port gas value ~1.855 D -> proves pppm/samqeq's compute_vector
# matches the former pppm/electrode result. Single-molecule pppm => run at np=1.
units           metal
atom_style      full
boundary        p p p
region          box block -14 14 -14 14 -14 14
create_box      2 box
mass            1 15.9994
mass            2 1.008
molecule        h2o spcfq.mol
create_atoms    0 single 0.0 0.0 0.0 mol h2o 1
group           fq type 1 2
set             type 1 charge -0.85
set             type 2 charge  0.425
pair_style      hybrid/overlay lj/cut 10.0 coul/long 10.0 coul/shield/intra 5.0 all
pair_coeff      1 1 lj/cut 0.01275 3.176
pair_coeff      1 2 lj/cut 0.0 1.0
pair_coeff      2 2 lj/cut 0.0 1.0
pair_coeff      * * coul/long
pair_coeff      * * coul/shield/intra 1.11
kspace_style    pppm/samqeq 1.0e-6
neighbor        2.0 bin
compute         dip fq dipole/samqeq
fix             chg fq qeq/sam 1 0.0 10.0 1.0e-9 spcfq_expt.param
thermo          1
thermo_style    custom step pe c_dip
run             0
variable        dipval equal c_dip
print           "GASDIPOLE ${dipval}"
variable        peval equal pe
print           "${peval}" file pe.txt screen no
write_dump      all custom charges.dump id type q modify sort id format line "%d %d %.12g"
