# Bit-test: extended-Lagrangian charge dynamics (#15) WITH the #13 Phase B per-type
# IP-staircase on-site anharmonicity (c3_type/c4_type, param columns 8/9) turned ON for
# the O type. Exercises the B3.1 staircase force branch in xl_chargeforce, the B3.2
# apply_quartic_eta() diagonal fill (lr_quartic auto-set by nonzero c3/c4 at param load),
# and confirms XL stays bounded/deterministic with the anharmonic on-site term active.
# np=1 + fixed velocity seed => deterministic; locks the XL+staircase propagation path.
units           metal
atom_style      full
boundary        p p p
lattice         sc 3.1
region          box block 0 4 0 4 0 4
create_box      2 box
mass            1 15.9994
mass            2 1.008
molecule        h2o spcfq.mol
create_atoms    0 box mol h2o 12345
group           fq type 1 2
set             type 1 charge -0.85
set             type 2 charge  0.425
pair_style      hybrid/overlay lj/cut 10.0 coul/long 10.0 coul/shield/intra 5.0 all
pair_coeff      1 1 lj/cut 0.01275 3.176
pair_coeff      1 2 lj/cut 0.0 1.0
pair_coeff      2 2 lj/cut 0.0 1.0
pair_coeff      * * coul/long
pair_coeff      * * coul/shield/intra 1.11
kspace_style    pppm/samqeq 1.0e-6
neighbor        2.0 bin
velocity        all create 298.0 12345 mom yes rot yes
timestep        0.0005
fix             chg fq qeq/sam 1 0.0 10.0 1.0e-5 spcfq_expt_staircase.param
fix_modify      chg xl 5.0e-5 0.5
fix             integ all rigid/nve/small molecule
run             10
variable        peval equal pe
print           "${peval}" file pe.txt screen no
write_dump      all custom charges.dump id type q modify sort id format line "%d %d %.12g"
